/NOPR
KEYW,PR_SET,1
KEYW,PR_STRUC,1
KEYW,LSDYNA,1
KEYW,PR_DYNA,1
/CWD,'C:\Users\Cliff\Desktop\tmp\3D_pullout'

PI = acos(-1)
r_disk = 37.5	!disk radius (mm)
td_ratio = 0.4
thickness = 2*r_disk*td_ratio	!disk thickness (mm)
H = 75  !total depth of specimen (mm)
r = 1	!spiral fibre coil radius (mm)
s = 10 	!spiral fibre pitch (mm)
n = 32	!division in single pitch (n must be multiple of 4)
D = n/4   !division in 90 degrees
p = 2+1/n	!spital fibre total pitch number (must be an integer plus integral multiple of 1/n)
theta = p*360	!spiral fibre total rotation angle (DEG)
!margin = 2*PI*r/n  !margin from fibre to outer cylindar (mm)
margin = r/D  !margin from fibre to outer cylindar (mm)
K_num = p*n+1	!total node number in one spiral fibre
L_num = K_num-1 !total element number in one spiral fibre
r_beam = 0.25   !radius of fibre section (mm)
f_num = 1	!number of fibres

/VIEW,1,1,1,1
/ANG,1
/REP,FAST

/PREP7
ET,1,SOLID164
ET,2,LINK160
R,1,r_beam,  !section area for fibre
MP,DENS,1,0.0024    !material properties
MP,EX,1,2e4
MP,NUXY,1,0.2
MP,DENS,2,0.0078
MP,EX,2,2e5
MP,NUXY,2,0.28
*DIM,F_NODES,ARRAY,f_num*(n*p+1),1,1, , ,   !fibre nodes for 1D contact
*DIM,C_NODES,ARRAY,f_num*(n*p+1),1,1, , ,   !concrete nodes for 1D contact

i=1
!*DO,i,1,f_num,1	!draw hollow cylindars and fibres
	CSWPLA,11,0,1,1,	!temporary Cartesian coordinate system
	CSWPLA,12,1,1,1,	!temporary Cylindrical coordinate system

	CSYS,11,
    BLOCK, ,H/2, ,H/2,-(H-s*p),s*p
    wpoff,0,0,-(H-s*p)
    CYL4, , ,0,0,r,90,H   !inner cylindar (from 0 to r)
	CYL4, , ,r,0,r+margin,90,H   !middle cylindar (from r to r+margin)
    CYL4, , ,r+margin,0,2*r,90,H  !outer cylindar (from r+margin to 2*r)
    WPCSYS,-1,0
    VSBW,ALL
    wpoff,0,0,-3*r
    VSBW,ALL
    VOVLAP,ALL
    VGLUE,ALL
    WPCSYS,-1,0
	VATT,1,1,1,0

	CSYS,12,
    VSEL,S, , ,6    !select first inner 1/4 cylindar (volume number 6)
    ASLV,R
    LSLA,R
    CM,CM_1,LINE    !line component
    CMSEL,S,CM_1
    LSEL,R,LOC,X,0,r,
    LSEL,R,LOC,Y,0
    LSEL,R,LOC,Z,0
    LESIZE,ALL, , ,D, ,1, , ,0,   !radial direction mesh size 1
    CMSEL,S,CM_1
    LSEL,R,LOC,X,0,r,
    LSEL,R,LOC,Y,0
    LSEL,R,LOC,Z,s*p
    LESIZE,ALL, , ,D, ,1, , ,0,   !radial direction mesh size 2
    CMSEL,S,CM_1
    LSEL,R,LOC,X,0,r,
    LSEL,R,LOC,Y,90
    LSEL,R,LOC,Z,0
    LESIZE,ALL, , ,D, ,1, , ,0,   !radial direction mesh size 3
    CMSEL,S,CM_1
    LSEL,R,LOC,X,0,r,
    LSEL,R,LOC,Y,90
    LSEL,R,LOC,Z,s*p
    LESIZE,ALL, , ,D, ,1, , ,0,   !radial direction mesh size 4
    CMSEL,S,CM_1
    LSEL,R,LOC,X,r
    LSEL,R,LOC,Z,0
    LESIZE,ALL, , ,D, ,1, , ,0,   !annular direction mesh size 1
    CMSEL,S,CM_1
    LSEL,R,LOC,X,r
    LSEL,R,LOC,Z,s*p
    LESIZE,ALL, , ,D, ,1, , ,0,   !annular direction mesh size 2
    CMSEL,S,CM_1
    LSEL,R,LOC,X,0
    LESIZE,ALL,s/n, , , ,1, , ,0,   !axial direction mesh size 1
    CMSEL,S,CM_1
    LSEL,R,LOC,X,r
    LSEL,R,LOC,Y,0
    LESIZE,ALL,s/n, , , ,1, , ,0,   !axial direction mesh size 2
    CMSEL,S,CM_1
    LSEL,R,LOC,X,r
    LSEL,R,LOC,Y,90
    LESIZE,ALL,s/n, , , ,1, , ,0,   !axial direction mesh size 3
    ALLSEL,ALL
    CMDELE,CM_1

    VSEL,S, , ,9    !select first middle 1/4 cylindar (volume number 9)
    ASLV,R
    LSLA,R
    CM,CM_1,LINE    !line component
    CMSEL,S,CM_1
    LSEL,R,LOC,X,r,r+margin,
    LSEL,R,LOC,Y,0
    LSEL,R,LOC,Z,0
    LESIZE,ALL, , ,1, ,1, , ,0,   !radial direction mesh size 1
    CMSEL,S,CM_1
    LSEL,R,LOC,X,r,r+margin,
    LSEL,R,LOC,Y,0
    LSEL,R,LOC,Z,s*p
    LESIZE,ALL, , ,1, ,1, , ,0,   !radial direction mesh size 2
    CMSEL,S,CM_1
    LSEL,R,LOC,X,r,r+margin,
    LSEL,R,LOC,Y,90
    LSEL,R,LOC,Z,0
    LESIZE,ALL, , ,1, ,1, , ,0,   !radial direction mesh size 3
    CMSEL,S,CM_1
    LSEL,R,LOC,X,r,r+margin,
    LSEL,R,LOC,Y,90
    LSEL,R,LOC,Z,s*p
    LESIZE,ALL, , ,1, ,1, , ,0,   !radial direction mesh size 4
    CMSEL,S,CM_1
    LSEL,R,LOC,X,r+margin
    LSEL,R,LOC,Z,0
    LESIZE,ALL, , ,D, ,1, , ,0,   !annular direction mesh size 1
    CMSEL,S,CM_1
    LSEL,R,LOC,X,r+margin
    LSEL,R,LOC,Z,s*p
    LESIZE,ALL, , ,D, ,1, , ,0,   !annular direction mesh size 2
    CMSEL,S,CM_1
    LSEL,R,LOC,X,r+margin
    LSEL,R,LOC,Y,0
    LESIZE,ALL,s/n, , , ,1, , ,0,   !axial direction mesh size 1
    CMSEL,S,CM_1
    LSEL,R,LOC,X,r+margin
    LSEL,R,LOC,Y,90
    LESIZE,ALL,s/n, , , ,1, , ,0,   !axial direction mesh size 2
    ALLSEL,ALL
    CMDELE,CM_1

    VSEL,S, , ,11   !select first outer 1/4 cylindar (volume number 11)
    ASLV,R
    LSLA,R
    CM,CM_1,LINE    !line component
    CMSEL,S,CM_1
    LSEL,R,LOC,X,r+margin,2*r,
    LSEL,R,LOC,Y,0
    LSEL,R,LOC,Z,0
    LESIZE,ALL, , ,D, ,1, , ,0,   !radial direction mesh size 1
    CMSEL,S,CM_1
    LSEL,R,LOC,X,r+margin,2*r,
    LSEL,R,LOC,Y,0
    LSEL,R,LOC,Z,s*p
    LESIZE,ALL, , ,D, ,1, , ,0,   !radial direction mesh size 2
    CMSEL,S,CM_1
    LSEL,R,LOC,X,r+margin,2*r,
    LSEL,R,LOC,Y,90
    LSEL,R,LOC,Z,0
    LESIZE,ALL, , ,D, ,1, , ,0,   !radial direction mesh size 3
    CMSEL,S,CM_1
    LSEL,R,LOC,X,r+margin,2*r,
    LSEL,R,LOC,Y,90
    LSEL,R,LOC,Z,s*p
    LESIZE,ALL, , ,D, ,1, , ,0,   !radial direction mesh size 4
    CMSEL,S,CM_1
    LSEL,S,LOC,X,2*r
    LSEL,R,LOC,Z,0
    LESIZE,ALL, , ,D, ,1, , ,0,   !annular direction mesh size 1
    CMSEL,S,CM_1
    LSEL,S,LOC,X,2*r
    LSEL,R,LOC,Z,s*p
    LESIZE,ALL, , ,D, ,1, , ,0,   !annular direction mesh size 2
    CMSEL,S,CM_1
    LSEL,R,LOC,X,2*r
    LSEL,R,LOC,Y,0
    LESIZE,ALL,s/n, , , ,1, , ,0,   !axial direction mesh size 1
    CMSEL,S,CM_1
    LSEL,R,LOC,X,2*r
    LSEL,R,LOC,Y,90
    LESIZE,ALL,s/n, , , ,1, , ,0,   !axial direction mesh size 2
    ALLSEL,ALL
    CMDELE,CM_1

    VSEL,S, , ,2    !select second inner 1/4 cylindar (volume number 2)
    ASLV,R
    LSLA,R
    CM,CM_1,LINE    !line component
    CMSEL,S,CM_1
    LSEL,R,LOC,X,0,r,
    LSEL,R,LOC,Y,0
    LSEL,R,LOC,Z,-3*r
    LESIZE,ALL, , ,D/2, ,1, , ,0,   !radial direction mesh size 1
    CMSEL,S,CM_1
    LSEL,R,LOC,X,0,r,
    LSEL,R,LOC,Y,90
    LSEL,R,LOC,Z,-3*r
    LESIZE,ALL, , ,D/2, ,1, , ,0,   !radial direction mesh size 2
    CMSEL,S,CM_1
    LSEL,R,LOC,X,r
    LSEL,R,LOC,Z,-3*r
    LESIZE,ALL, , ,D/2, ,1, , ,0,   !annular direction mesh size 1
    CMSEL,S,CM_1
    LSEL,R,LOC,X,0
    LESIZE,ALL,s/n, , , ,1, , ,0,   !axial direction mesh size 1
    CMSEL,S,CM_1
    LSEL,R,LOC,X,r
    LSEL,R,LOC,Y,0
    LESIZE,ALL,s/n, , , ,1, , ,0,   !axial direction mesh size 2
    CMSEL,S,CM_1
    LSEL,R,LOC,X,r
    LSEL,R,LOC,Y,90
    LESIZE,ALL,s/n, , , ,1, , ,0,   !axial direction mesh size 3
    ALLSEL,ALL
    CMDELE,CM_1

    VSEL,S, , ,7    !select second middle 1/4 cylindar (volume number 7)
    ASLV,R
    LSLA,R
    CM,CM_1,LINE    !line component
    CMSEL,S,CM_1
    LSEL,R,LOC,X,r,r+margin,
    LSEL,R,LOC,Y,0
    LSEL,R,LOC,Z,-3*r
    LESIZE,ALL, , ,1, ,1, , ,0,   !radial direction mesh size 1
    CMSEL,S,CM_1
    LSEL,R,LOC,X,r,r+margin,
    LSEL,R,LOC,Y,90
    LSEL,R,LOC,Z,-3*r
    LESIZE,ALL, , ,1, ,1, , ,0,   !radial direction mesh size 2
    CMSEL,S,CM_1
    LSEL,R,LOC,X,r+margin
    LSEL,R,LOC,Z,-3*r
    LESIZE,ALL, , ,D/2, ,1, , ,0,   !annular direction mesh size 1
    CMSEL,S,CM_1
    LSEL,R,LOC,X,r+margin
    LSEL,R,LOC,Y,0
    LESIZE,ALL,s/n, , , ,1, , ,0,   !axial direction mesh size 1
    CMSEL,S,CM_1
    LSEL,R,LOC,X,r+margin
    LSEL,R,LOC,Y,90
    LESIZE,ALL,s/n, , , ,1, , ,0,   !axial direction mesh size 2
    ALLSEL,ALL
    CMDELE,CM_1

    VSEL,S, , ,18   !select second outer 1/4 cylindar (volume number 18)
    ASLV,R
    LSLA,R
    CM,CM_1,LINE    !line component
    CMSEL,S,CM_1
    LSEL,R,LOC,X,r+margin,2*r,
    LSEL,R,LOC,Y,0
    LSEL,R,LOC,Z,-3*r
    LESIZE,ALL, , ,D/2, ,1, , ,0,   !radial direction mesh size 1
    CMSEL,S,CM_1
    LSEL,R,LOC,X,r+margin,2*r,
    LSEL,R,LOC,Y,90
    LSEL,R,LOC,Z,-3*r
    LESIZE,ALL, , ,D/2, ,1, , ,0,   !radial direction mesh size 2
    CMSEL,S,CM_1
    LSEL,S,LOC,X,2*r
    LSEL,R,LOC,Z,-3*r
    LESIZE,ALL, , ,D/2, ,1, , ,0,   !annular direction mesh size 1
    CMSEL,S,CM_1
    LSEL,R,LOC,X,2*r
    LSEL,R,LOC,Y,0
    LESIZE,ALL,s/n, , , ,1, , ,0,   !axial direction mesh size 1
    CMSEL,S,CM_1
    LSEL,R,LOC,X,2*r
    LSEL,R,LOC,Y,90
    LESIZE,ALL,s/n, , , ,1, , ,0,   !axial direction mesh size 2
    ALLSEL,ALL
    CMDELE,CM_1

    VSEL,S, , ,1    !select third inner 1/4 cylindar (volume number 1)
    ASLV,R
    LSLA,R
    CM,CM_1,LINE    !line component
    CMSEL,S,CM_1
    LSEL,R,LOC,X,0,r,
    LSEL,R,LOC,Y,0
    LSEL,R,LOC,Z,-(H-s*p)
    LESIZE,ALL, , ,D/2, ,1, , ,0,   !radial direction mesh size 1
    CMSEL,S,CM_1
    LSEL,R,LOC,X,0,r,
    LSEL,R,LOC,Y,90
    LSEL,R,LOC,Z,-(H-s*p)
    LESIZE,ALL, , ,D/2, ,1, , ,0,   !radial direction mesh size 2
    CMSEL,S,CM_1
    LSEL,R,LOC,X,r
    LSEL,R,LOC,Z,-(H-s*p)
    LESIZE,ALL, , ,D/2, ,1, , ,0,   !annular direction mesh size 1
    CMSEL,S,CM_1
    LSEL,R,LOC,X,0
    LESIZE,ALL,2*s/n, , , ,1, , ,0,   !axial direction mesh size 1
    CMSEL,S,CM_1
    LSEL,R,LOC,X,r
    LSEL,R,LOC,Y,0
    LESIZE,ALL,2*s/n, , , ,1, , ,0,   !axial direction mesh size 2
    CMSEL,S,CM_1
    LSEL,R,LOC,X,r
    LSEL,R,LOC,Y,90
    LESIZE,ALL,2*s/n, , , ,1, , ,0,   !axial direction mesh size 3
    ALLSEL,ALL
    CMDELE,CM_1

    VSEL,S, , ,5    !select third middle 1/4 cylindar (volume number 5)
    ASLV,R
    LSLA,R
    CM,CM_1,LINE    !line component
    CMSEL,S,CM_1
    LSEL,R,LOC,X,r,r+margin,
    LSEL,R,LOC,Y,0
    LSEL,R,LOC,Z,-(H-s*p)
    LESIZE,ALL, , ,1, ,1, , ,0,   !radial direction mesh size 1
    CMSEL,S,CM_1
    LSEL,R,LOC,X,r,r+margin,
    LSEL,R,LOC,Y,90
    LSEL,R,LOC,Z,-(H-s*p)
    LESIZE,ALL, , ,1, ,1, , ,0,   !radial direction mesh size 2
    CMSEL,S,CM_1
    LSEL,R,LOC,X,r+margin
    LSEL,R,LOC,Z,-(H-s*p)
    LESIZE,ALL, , ,D/2, ,1, , ,0,   !annular direction mesh size 1
    CMSEL,S,CM_1
    LSEL,R,LOC,X,r+margin
    LSEL,R,LOC,Y,0
    LESIZE,ALL,2*s/n, , , ,1, , ,0,   !axial direction mesh size 1
    CMSEL,S,CM_1
    LSEL,R,LOC,X,r+margin
    LSEL,R,LOC,Y,90
    LESIZE,ALL,2*s/n, , , ,1, , ,0,   !axial direction mesh size 2
    ALLSEL,ALL
    CMDELE,CM_1

    VSEL,S, , ,17   !select third outer 1/4 cylindar (volume number 17)
    ASLV,R
    LSLA,R
    CM,CM_1,LINE    !line component
    CMSEL,S,CM_1
    LSEL,R,LOC,X,r+margin,2*r,
    LSEL,R,LOC,Y,0
    LSEL,R,LOC,Z,-(H-s*p)
    LESIZE,ALL, , ,D/2, ,1, , ,0,   !radial direction mesh size 1
    CMSEL,S,CM_1
    LSEL,R,LOC,X,r+margin,2*r,
    LSEL,R,LOC,Y,90
    LSEL,R,LOC,Z,-(H-s*p)
    LESIZE,ALL, , ,D/2, ,1, , ,0,   !radial direction mesh size 2
    CMSEL,S,CM_1
    LSEL,S,LOC,X,2*r
    LSEL,R,LOC,Z,-(H-s*p)
    LESIZE,ALL, , ,D/2, ,1, , ,0,   !annular direction mesh size 1
    CMSEL,S,CM_1
    LSEL,R,LOC,X,2*r
    LSEL,R,LOC,Y,0
    LESIZE,ALL,2*s/n, , , ,1, , ,0,   !axial direction mesh size 1
    CMSEL,S,CM_1
    LSEL,R,LOC,X,2*r
    LSEL,R,LOC,Y,90
    LESIZE,ALL,2*s/n, , , ,1, , ,0,   !axial direction mesh size 2
    ALLSEL,ALL
    CMDELE,CM_1


    CSYS,11,
    VSEL,S, , ,      20 !select residual 1/4 volume 1 (volume number 20)
    ASLV,R
    LSLA,R
    CM,CM_1,LINE    !line component
    CMSEL,S,CM_1

    LPLOT

    LSEL,R,LOC,X,H/2
    LSEL,R,LOC,Y,0
    LESIZE,ALL,s/n, , , ,1, , ,0,   !axial direction mesh size 1
    CMSEL,S,CM_1
    LSEL,R,LOC,X,H/2
    LSEL,R,LOC,Y,H/2
    LESIZE,ALL,s/n, , , ,1, , ,0,   !axial direction mesh size 2
    CMSEL,S,CM_1
    LSEL,R,LOC,X,0,0,
    LSEL,R,LOC,Y,H/2
    LESIZE,ALL,s/n, , , ,1, , ,0,   !axial direction mesh size 3
    CMSEL,S,CM_1
    LSEL,R,LOC,X,2*r,H/2,
    LSEL,R,LOC,Z,0
    LESIZE,ALL,4*s/n, , , ,1, , ,0,   !edge mesh size 1
    CMSEL,S,CM_1
    LSEL,R,LOC,X,2*r,H/2,
    LSEL,R,LOC,Z,s*p
    LESIZE,ALL,4*s/n, , , ,1, , ,0,   !edge mesh size 2
    CMSEL,S,CM_1
    LSEL,R,LOC,X,0
    LSEL,R,LOC,Z,0
    LESIZE,ALL,4*s/n, , , ,1, , ,0,   !edge mesh size 3
    CMSEL,S,CM_1
    LSEL,R,LOC,X,0
    LSEL,R,LOC,Z,s*p
    LESIZE,ALL,4*s/n, , , ,1, , ,0,   !edge mesh size 4
    ALLSEL,ALL
    CMDELE,CM_1
!
!
!
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!
!    EXTOPT,VSWE,TETS,1
!	VSWEEP,ALL
!    CSYS,11,
!	VSYMM,X,ALL, , , ,0,0
!	VSYMM,Y,ALL, , , ,0,0
!    NUMMRG,ALL, , , ,LOW
!
!
!
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!
!	*GET,ii,NODE,0,NUM,MAX !ii for temporarily storing maximum node number
!	CSYS,12
!	*DO,j,1,n*p+1,1 !draw nodes for single fibre
!        r1=r-margin/2
!        r2=r+margin/2
!	    NSEL,S,LOC,X,r1,r2
!	    theta1=mod(360*(j-1)/n,360)-360/n/D
!	    theta2=mod(360*(j-1)/n,360)+360/n/D
!        *IF,theta1,lt,theta2,THEN
!	        NSEL,R,LOC,Y,theta1,theta2
!        *ELSE
!	        NSEL,R,LOC,Y,-(360-theta1),theta2
!        *ENDIF
!	    gama1=s/n*(j-1)-s/n/D/2
!	    gama2=s/n*(j-1)+s/n/D/2
!	    NSEL,R,LOC,Z,gama1,gama2
!	    *GET,ijk,NODE,0,NUM,MIN
!	    *SET,C_NODES((i-1)*(n*p+1)+j,1,1),ijk
!	    *GET,iii,NODE,ijk,LOC,X
!	    *GET,jjj,NODE,ijk,LOC,Y
!	    *GET,kkk,NODE,ijk,LOC,Z
!	    N,,iii,jjj,kkk
!		*GET,n_max,NODE,0,NUM,MAX	!n_max for temporarily storing maximum node number
!		*SET,F_NODES((i-1)*(n*p+1)+j,1,1),n_max
!	    ALLSEL,ALL
!	*ENDDO
!
!	CSYS,11
!	TYPE,2
!	MAT,2
!	REAL,1
!	ESYS,0
!	SECNUM,
!	*DO,j,1,n*p,1   !draw beam elements for single fibre
!	    E,ii+j,ii+j+1
!	*ENDDO
!	WPCSYS,-1,0
!*ENDDO
!
!*DO,i,1,f_num*(n*p+1),1 !concrete nodes for 1D contact
!    *SET,j,C_NODES(i,1,1)
!    *IF,i,eq,1,then
!        NSEL,S,,,j
!    *ELSE
!        NSEL,A,,,j
!    *ENDIF
!*ENDDO
!CM,C_NODES,NODE
!CMSEL,A,C_NODES
!ALLSEL,ALL
!
!*DO,i,1,f_num*(n*p+1),1 !fibre nodes for 1D contact
!    *SET,j,F_NODES(i,1,1)
!    *IF,i,eq,1,then
!        NSEL,S,,,j
!    *ELSE
!        NSEL,A,,,j
!    *ENDIF
!*ENDDO
!CM,F_NODES,NODE
!CMSEL,A,F_NODES
!ALLSEL,ALL
!
!CMSEL,S,C_NODES 	!concrete node set for 1D contact
!D,ALL, , , , , ,UX, , , , ,
!ALLSEL,ALL
!CMSEL,S,F_NODES 	!fibre node set for 1D contact
!D,ALL, , , , , ,UY, , , , ,
!ALLSEL,ALL
!
!ESEL,S,MAT,,2   !node and beam element for loading
!NSLE,R
!*GET,n_max,NODE,0,NUM,MAX	!n_max for temporarily storing maximum node number
!NWPAVE,n_max
!CSYS,4
!N, ,,,5,,,,
!CSYS,0
!*GET,nn_max,NODE,0,NUM,MAX	!nn_max for temporarily storing maximum node number
!E,n_max,nn_max
!NSEL,S, , ,nn_max
!CM,PULL,NODE
!CMSEL,A,PULL
!*DIM,TIME,ARRAY,2,1,1, , ,
!*SET,TIME(2,1,1) , 1000
!*DIM,DISP,ARRAY,2,1,1, , ,
!*SET,DISP(2,1,1) , 16.67
!EDLOAD,ADD,UZ,0,PULL,TIME,DISP, 0, , , , ,
!ALLSEL,ALL
!
!ESEL,S,MAT,,1   !merge concrete nodes
!NSLE,R
!NUMMRG,NODE, , , ,LOW
!ALLSEL,ALL
!
!ASEL,S,LOC,Z,-(H-s*p)  !fix end
!NSLA,R,1
!D,ALL, , , , , ,ALL, , , , ,
!ALLSEL,ALL
!
!
!FINISH
!/SOL
!TIME,3,
!EDRST, ,0.1,
!EDHTIME, ,0,
!EDDUMP, ,0,
!EDWRITE,LSDYNA,'tmp','k',' '
